# Начальные условия | Начальные условия | Исходные данные
V
cvx := 2
cvy := 1
ρ := 0.013
k := 0.00009
Θ
g := 3.86
H
m := 1000
s := 1.5
L := 1.5
b := 0
R := 3389500
G
mz0 := -0.1
I := 443
Ix := 270
Θ1 := 180
r
mAx := 0.04
y := [3900; -0.0261799; 50000; 1; 0.5; 0.5; 1; 0.562; 0; 0.2]  # φ
Δy := 0.02
myφ := 0.03
mzn := 1
Θ2 := 0
Δz := 0.02
mzφ := 0.05
mA := 0.05
dα
α
mznw := 0.1
dα2
cyva := 1
α2
# Решение исходной системы
D(t, y) := [
    ((-cvx)*ρ*e^(-k*y[2])*y[0]^2/2*s - m*(g*R^2*sin(y[1])/(y[2] + R)^2))/m;
    (y[0]/(y[2] + R) - g*R^2/(y[0]*(y[2] + R)^2))*cos(y[1]);
    y[0]*sin(y[1]);
    (((cvy*cos(y[7]) - cvx*sin(y[7]))*((Δz*cos(y[5]) + Δy*sin(y[5]))/L)*ρ*(e^(-k*y[2])*y[0]^2/2*s*L))*cos(y[7]) - ((myφ - (cvx*cos(y[7]) + cvy*sin(y[7]))*Δz/L)*cos(y[5]) - (mzφ - (cvx*cos(y[7]) + cvy*sin(y[7]))*Δy/L)*sin(y[5]))*(ρ*(e^(-k*y[2])*y[0]^2/2*s*L))*sin(y[7]))/I + cvy*(ρ*(e^(-k*y[2])*y[0]^2/2*s))*(y[4]*cos(y[7]) - y[3])/(m*y[0]*sin(y[7]));
    (cvy*cos(y[7]) - cvx*sin(y[7]))*((Δz*cos(y[5]) + Δy*sin(y[5]))/L)*ρ*(e^(-k*y[2])*y[0]^2/2*s*L)/I;
    y[4]/(Ix/I) + (y[4]*cos(y[7]) - y[3])*cos(y[7])/sin(y[7])^2;
    (-mz0*sin(y[7])*ρ*e^(-k*y[2])*y[0]^2/2*s*L)/I + (y[4]*cos(y[7]) - y[3])*(y[4] - y[3]*cos(y[7]))/sin(y[7])^3 + ((mzφ + (cvx*cos(y[7]) + cvy*sin(y[7]))*Δy/L)*cos(y[5]) + (myφ - (cvx*cos(y[7]) + cvy*sin(y[7]))*Δz/L)*sin(y[5]))*(ρ*(e^(-k*y[2])*y[0]^2/2*s*L))/I + (mznw*(ρ*(e^(-k*y[2])*y[0]^2/2*s*L^2))/y[0] - cyva*ρ*(e^(-k*y[2])*y[0]^2/2*s)/(m*y[0]))*1;
    y[6];
    (((-mznw)*(ρ*(e^(-k*y[2])*y[0]^2/2*s*L^2))/y[0] + cyva*ρ*(e^(-k*y[2])*y[0]^2/2*s)/(m*y[0]))*y[8]*1) - ((-mz0)*cos(y[9])*(ρ*(e^(-k*y[2])*y[0]^2/2*s*L))/I - 3*mz0*sin(y[9])*ρ*(e^(-k*y[2])*y[0]^2/2*s*L)*1/tan(y[9]) + (1*(y[3]^2 + y[4]^2 - 2*y[3]*y[4]*cos(y[9]))/(sin(y[9])^2 + 0.14)))*y[9];
    y[8]
]
Z := Rkadapt(y, 0, 400, 40000, D)
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V  # Θ
H
G
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α
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α2
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r
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фи
# dα | dα2
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# Решение низкочастотной системы
# Начальные условия
V
q(V, H) := ρ*e^(-k*H)*V^2/2
θ
y := [3900; -0.0261799; 50000; 0.5; 0.562; 0]  # H
dq(V, H, θ) := q(V, H)*(-k*V*sin(θ)) + ρ*e^(-k*H)*V*((-cvx)*q(V, H)*s - m*(g*R^2*sin(θ)/(H + R)^2))/m
ω[x]
α
ω(V, H, α) := sqrt(-mz0*q(V, H)*s*L*cos(α)/I)
Θ
ωα(ωx, V, H, α) := sqrt((Ix/I)^2*ωx^2/4 + ω(V, H, α)^2)
ω12(ωx, V, H, α) := Ix/I/2 + (2*(ωx > 0) - 1)*ωα(ωx, V, H, α)
Fa(ωx, V, H, α) := -mz0*q(V, H)*s*L*cos(α)/I + ω12(ωx, V, H, α)^2/cos(α)^2 + ((Ix/I)*ωx - ω12(ωx, V, H, α))*((Ix/I)*ωx - 2*ω12(ωx, V, H, α))
D(t, y) := [
    ((-cvx)*q(y[0], y[2])*s - m*(g*R^2*sin(y[1])/(y[2] + R)^2))/m;
    (y[0]/(y[2] + R) - g*R^2/(y[0]*(y[2] + R)^2))*cos(y[1]);
    y[0]*sin(y[1]);
    (-mAx)*sin(y[4])*sin(y[5] + Θ2)/(Ix/I);
    (-tan(y[4])*ω(y[0], y[2], y[4])^2*dq(y[0], y[2], y[1])/(2*ωα(y[3], y[0], y[2], y[4])^2*2*q(y[0], y[2])) + (2*(y[3] < 0) - 1)*mA*ω(y[0], y[2], y[4])^2*cos(y[5] + Θ1)/(2*ωα(y[3], y[0], y[2], y[4])))*(4*ωα(y[3], y[0], y[2], y[4])^2/Fa(y[3], y[0], y[2], y[4]));
    y[3] - ω12(y[3], y[0], y[2], y[4]) + (2*(y[3] > 0) - 1)*mA*ω(y[0], y[2], y[4])^2*sin(y[5] + Θ1)/(2*ωα(y[3], y[0], y[2], y[4])*sin(y[4]))
]
Z := Rkadapt(y, 0, 400, 40000, D)
wxr := vectorize(ω(Z[:, 1], Z[:, 3], Z[:, 5])*(2*(y[3] > 0) - 1)/sqrt(1 - Ix/I))
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V  # Θ
H
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ωx
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α
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Θ
